# OpenSim document version 40500
InverseKinematicsTool:
  results_directory: ./
  constraint_weight: Inf
  accuracy: 1e-5
  time_range: 0 1
  report_errors: true
  report_marker_locations: false
  IKTaskSet:
    IKMarkerTask Nose: apply=false weight=0
    IKMarkerTask Head: apply=true weight=0.1
    IKMarkerTask Neck: apply=true weight=1
    IKMarkerTask LShoulder: apply=true weight=1.5
    IKMarkerTask RShoulder: apply=true weight=2
    IKMarkerTask LElbow: apply=true weight=0.5
    IKMarkerTask RElbow: apply=true weight=0.5
    IKMarkerTask LWrist: apply=true weight=1
    IKMarkerTask RWrist: apply=true weight=1
    IKMarkerTask Pelvis: apply=true weight=3
    IKMarkerTask LHip: apply=true weight=3
    IKMarkerTask RHip: apply=true weight=3
    IKMarkerTask Spine_1: apply=true weight=2
    IKMarkerTask Spine_2: apply=true weight=1
    IKMarkerTask Spine_3: apply=true weight=1
    IKMarkerTask LKnee: apply=true weight=2
    IKMarkerTask RKnee: apply=true weight=2
    IKMarkerTask LAnkle: apply=true weight=2
    IKMarkerTask RAnkle: apply=true weight=2
    IKMarkerTask LBigToe: apply=true weight=1
    IKMarkerTask LSmallToe: apply=true weight=1
    IKMarkerTask LHeel: apply=true weight=1
    IKMarkerTask RBigToe: apply=true weight=1
    IKMarkerTask RSmallToe: apply=true weight=1
    IKMarkerTask RHeel: apply=true weight=1
    IKCoordinateTask L5_S1_Flex_Ext: apply=true weight=0.1 value_type=default_value value=0
