# OpenSim document version 40000
# Custom 25-marker set for SMPLest-X hybrid pipeline (Pelvis + Spine_1/2/3 + standard limbs)
MarkerSet:
  Marker Nose: head (0.116266 0.0126096 0.000152885) fixed=true
  Marker Head: head (0.0159224 0.164131 0) fixed=true
  Marker Neck: torso (-0.0008130659 0.4468969 0.0001848562) fixed=true
  Marker LShoulder: torso (-0.01275162 0.3663071 -0.2015742) fixed=true
  Marker RShoulder: torso (-0.01275162 0.3663071 0.2015742) fixed=true
  Marker LElbow: humerus_l (0.025 -0.2979545 0.008737653) fixed=true
  Marker RElbow: humerus_r (0.025 -0.2979545 -0.008737653) fixed=true
  Marker LWrist: radius_l (-0.0001735891 -0.235096 -0.009743795) fixed=true
  Marker RWrist: radius_r (-0.0001735891 -0.235096 0.009743795) fixed=true
  # Pelvis replaces Hip - same body, same location
  Marker Pelvis: pelvis (-0.0639274 -0.08134311 0) fixed=true
  Marker LHip: pelvis (-0.06392744 -0.08134311 -0.1054064) fixed=true
  Marker RHip: pelvis (-0.06392744 -0.08134311 0.1054064) fixed=true
  # Spine markers: Spine_1 on sacrum (welded to pelvis), Spine_2/3 on torso
  Marker Spine_1: sacrum (-0.03 0.05 0)
  Marker Spine_2: torso (-0.02 0.15 0)
  Marker Spine_3: torso (-0.01 0.3 0)
  Marker LKnee: femur_l (-0.00541048 -0.397886 -0.000611877) fixed=true
  Marker RKnee: femur_r (-0.00541048 -0.397886 0.000611877) fixed=true
  Marker LAnkle: tibia_l (-0.0002863098 -0.40805 -0.01495955) fixed=true
  Marker RAnkle: tibia_r (-0.0002863098 -0.40805 0.01495955) fixed=true
  Marker LBigToe: toes_l (0.0646643 0.009869336 0.01458025) fixed=true
  Marker LSmallToe: toes_l (0.02711665 0.009571644 -0.02878016) fixed=true
  Marker LHeel: calcn_l (0.01358603 0.02330436 0.001886717) fixed=true
  Marker RBigToe: toes_r (0.0646643 0.009869336 -0.01458025) fixed=true
  Marker RSmallToe: toes_r (0.02711665 0.009571644 0.02878016) fixed=true
  Marker RHeel: calcn_r (0.01358603 0.02330436 -0.001886717) fixed=true
