# OpenSim document version 40500
ScaleTool Pose2Sim_scaled:
  mass: 69
  height: -1
  age: -1
  notes: Custom 25-marker hybrid skeleton (SMPLest-X + Pose2Sim)
  ModelScaler:
    apply: true
    scaling_order: measurements manualScale
    time_range: 0 1
    preserve_mass_distribution: true
    MeasurementSet:
      Measurement torso: apply=true
        MarkerPair: markers=(Spine_1 Neck)
        MarkerPair: markers=(RShoulder RHip)
        BodyScale lumbar5: axes=(X Y Z)
        BodyScale lumbar4: axes=(X Y Z)
        BodyScale lumbar3: axes=(X Y Z)
        BodyScale lumbar2: axes=(X Y Z)
        BodyScale lumbar1: axes=(X Y Z)
        BodyScale torso: axes=(X Y Z)
      Measurement arm: apply=true
        MarkerPair: markers=(LShoulder LElbow)
        MarkerPair: markers=(RShoulder RElbow)
        BodyScale humerus_r: axes=(X Y Z)
        BodyScale humerus_l: axes=(X Y Z)
      Measurement forearm: apply=true
        MarkerPair: markers=(LElbow LWrist)
        MarkerPair: markers=(RElbow RWrist)
        BodyScale ulna_r: axes=(X Y Z)
        BodyScale radius_r: axes=(X Y Z)
        BodyScale hand_r: axes=(X Y Z)
        BodyScale ulna_l: axes=(X Y Z)
        BodyScale radius_l: axes=(X Y Z)
        BodyScale hand_l: axes=(X Y Z)
      Measurement thigh: apply=true
        MarkerPair: markers=(LHip LKnee)
        MarkerPair: markers=(RHip RKnee)
        BodyScale femur_r: axes=(X Y Z)
        BodyScale patella_r: axes=(X Y Z)
        BodyScale femur_l: axes=(X Y Z)
        BodyScale patella_l: axes=(X Y Z)
      Measurement shank: apply=true
        MarkerPair: markers=(LKnee LAnkle)
        MarkerPair: markers=(RKnee RAnkle)
        BodyScale tibia_r: axes=(X Y Z)
        BodyScale tibia_l: axes=(X Y Z)
      Measurement foot: apply=true
        MarkerPair: markers=(LHeel LBigToe)
        MarkerPair: markers=(RHeel RBigToe)
        BodyScale talus_r: axes=(X Y Z)
        BodyScale calcn_r: axes=(X Y Z)
        BodyScale toes_r: axes=(X Y Z)
        BodyScale talus_l: axes=(X Y Z)
        BodyScale calcn_l: axes=(X Y Z)
        BodyScale toes_l: axes=(X Y Z)
      Measurement head: apply=true
        MarkerPair: markers=(Head Nose)
        MarkerPair: markers=(Head Neck)
        BodyScale head: axes=(X Y Z)
      Measurement pelvis: apply=true
        MarkerPair: markers=(RHip LHip)
        MarkerPair: markers=(Pelvis Spine_1)
        BodyScale pelvis: axes=(X Y Z)
        BodyScale sacrum: axes=(X Y Z)
  MarkerPlacer:
    apply: false
    time_range: 0 1
    max_marker_movement: -1
    IKTaskSet:
      IKMarkerTask Nose: apply=true weight=0.1
      IKMarkerTask Head: apply=true weight=0.1
      IKMarkerTask Neck: apply=true weight=1
      IKMarkerTask LShoulder: apply=true weight=2
      IKMarkerTask RShoulder: apply=true weight=2
      IKMarkerTask LElbow: apply=true weight=1
      IKMarkerTask RElbow: apply=true weight=1
      IKMarkerTask LWrist: apply=true weight=1
      IKMarkerTask RWrist: apply=true weight=1
      IKMarkerTask Pelvis: apply=true weight=1
      IKMarkerTask LHip: apply=true weight=2
      IKMarkerTask RHip: apply=true weight=2
      IKMarkerTask Spine_1: apply=true weight=1.5
      IKMarkerTask Spine_2: apply=true weight=1.5
      IKMarkerTask Spine_3: apply=true weight=1.5
      IKMarkerTask LKnee: apply=true weight=1
      IKMarkerTask RKnee: apply=true weight=1
      IKMarkerTask LAnkle: apply=true weight=1
      IKMarkerTask RAnkle: apply=true weight=1
      IKMarkerTask LBigToe: apply=true weight=1
      IKMarkerTask LSmallToe: apply=true weight=1
      IKMarkerTask LHeel: apply=true weight=1
      IKMarkerTask RBigToe: apply=true weight=1
      IKMarkerTask RSmallToe: apply=true weight=1
      IKMarkerTask RHeel: apply=true weight=1
      IKCoordinateTask pelvis_tilt: apply=true weight=0 value_type=default_value value=0
      IKCoordinateTask pelvis_list: apply=true weight=0.1 value_type=default_value value=0
      IKCoordinateTask L5_S1_Flex_Ext: apply=true weight=0.1 value_type=default_value value=0
